# OpenSim document version 30000
Model:
  ForceSet:
    Thelen2003Muscle [values shared by the 8 below unless stated]: max_isometric_force=1000 optimal_fiber_length=0.5
        tendon_slack_length=0.5
    Thelen2003Muscle muscle0:
      PathPoint muscle0_node0: shoulder (0.04148598 0.02582832 -0.01419879)
      PathPoint muscle0_node1: upperArm (0.02543799 0.01170051 0.08353239)
    Thelen2003Muscle muscle1:
      PathPoint muscle1_node0: shoulder (0.03921255 -0.02917168 -0.01419879)
      PathPoint muscle1_node1: upperArm (0.02407354 -0.01429949 0.08353239)
    Thelen2003Muscle muscle2:
      PathPoint muscle2_node0: shoulder (-0.0414844 0.02582832 -0.01419879)
      PathPoint muscle2_node1: upperArm (-0.02543795 0.01170051 0.08353239)
    Thelen2003Muscle muscle3:
      PathPoint muscle3_node0: shoulder (-0.03921096 -0.02917168 -0.01419879)
      PathPoint muscle3_node1: upperArm (-0.02407349 -0.01429949 0.08353239)
    Thelen2003Muscle muscle4:
      PathPoint muscle4_node0: upperArm (0.02543799 0.01170051 -0.07846761)
      PathPoint muscle4_node1: lowerArm (0.03226625 0.03121001 0.06408506)
      PathPoint muscle4_node2: lowerArm (0.03090077 -0.003894935 -0.0780371)
    Thelen2003Muscle muscle5:
      PathPoint muscle5_node0: upperArm (0.02407354 -0.01429949 -0.07846761)
      PathPoint muscle5_node1: lowerArm (0.02892416 -0.000863691 0.07293138)
      PathPoint muscle5_node2: lowerArm (0.03156187 -0.03389493 -0.0680371)
    Thelen2003Muscle muscle6:
      PathPoint muscle6_node0: upperArm (-0.02543795 0.01170051 -0.07846761)
      PathPoint muscle6_node1: lowerArm (-0.03226513 0.03121001 0.06408506)
      PathPoint muscle6_node2: lowerArm (-0.03089965 -0.003894935 -0.0780371)
    Thelen2003Muscle muscle7:
      PathPoint muscle7_node0: upperArm (-0.02407349 -0.01429949 -0.07846761)
      PathPoint muscle7_node1: lowerArm (-0.02892304 -0.000863691 0.07293138)
      PathPoint muscle7_node2: lowerArm (-0.03156075 -0.03389493 -0.0680371)
